** input file created by OLTranSim
**
** PARTS
**
*Part, name=NAS-180k-dry
*Node
      1,      167730,        2520,           0
      2,      167730,           0,           0
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*Element, type=S4I
8820638,  11467,   9394,   9395,  11468
8820639,   9395,   6440,   9396,  11468
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*Element, type=B33
8826475,   5160,  11416
8826476,  11416,  11415
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*Element, type=T3D2
8872790,  57692,  57681
8872791,  57680,  57692
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*Element, type=S3I
8826313,  13121,   8704,   8707
8826314,   6460,  11124,  10849
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*Elset, elset=Set-19, generate
8826475, 8826493,       1
*Elset, elset=Set-20, generate
8826494, 8826522,       1
*Elset, elset=Set-45, generate
8826523, 8826551,       1
*Elset, elset=Set-52, generate
8826552, 8826609,       1
*Elset, elset=Set-404, generate
8826610, 8826638,       1
*Elset, elset=Set-405, generate
8820728, 8820925,       1
*Elset, elset=Set-406, generate
8820926, 8821803,       1
*Elset, elset=Set-407, generate
8821804, 8821839,       1
*Elset, elset=Set-408, generate
8821840, 8822019,       1
*Elset, elset=Set-409, generate
8822020, 8822235,       1
*Elset, elset=Set-410, generate
8826639, 8826665,       1
*Elset, elset=Set-411, generate
8826666, 8826692,       1
*Elset, elset=Set-412, generate
8826693, 8826719,       1
*Elset, elset=Set-413
8822236,8822237,8822238,8822239,8822240,8822241
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*Elset, elset=Set-414, generate
8822932, 8823018,       1
*Elset, elset=Set-415, generate
8823019, 8823192,       1
*Elset, elset=Set-423
8823193,8823194,8823195,8823196,8823197,8823198
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*Elset, elset=Set-424
8823626,8823627,8823629,8823630,8823634,8823635
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*Elset, elset=Set-425
8823718,8823719,8823721,8823722,8823728,8823729
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*Elset, elset=Set-433, generate
8826720, 8826777,       1
*Elset, elset=Set-434, generate
8826778, 8826806,       1
*Elset, elset=Set-435, generate
8823841, 8823912,       1
*Elset, elset=Set-436, generate
8823913, 8823984,       1
*Elset, elset=Set-437, generate
8823985, 8824128,       1
*Elset, elset=Set-438, generate
8824129, 8824320,       1
*Elset, elset=Set-439, generate
8824321, 8824536,       1
*Elset, elset=Set-440, generate
8826807, 8827040,       1
*Elset, elset=Set-441, generate
8827041, 8827418,       1
*Elset, elset=Set-442
8820638,8820639,8820640,8820641,8820642,8820643
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*Elset, elset=Set-444
8825095,8825096,8825097,8825098,8825099,8825100
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*Elset, elset=Set-445, generate
8827419, 8827472,       1
*Elset, elset=Set-446
8827473,8827474,8827475,8827476,8827477,8827478
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*Elset, elset=Set-447
8827560,8827561,8827562,8827563,8827564,8827565
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*Elset, elset=Set-448, generate
8827763, 8827816,       1
*Elset, elset=Set-449, generate
8827817, 8827845,       1
*Elset, elset=Set-450, generate
8827846, 8827903,       1
*Elset, elset=Set-451, generate
8827904, 8828135,       1
*Elset, elset=Set-455, generate
8828136, 8828154,       1
*Elset, elset=Set-456, generate
8828155, 8828183,       1
*Elset, elset=Set-457, generate
8828184, 8828241,       1
*Elset, elset=Set-458, generate
8825965, 8826312,       1
*Elset, elset=dz-elem
8820638,8820639,8820640,8820641,8820642,8820643
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*Nset, nset=dz-node
    1,    2,    3,    4,    5,    6
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*Nset, nset=_PickedSet866
  1258,  1265,  1274,  1281,  6300,  6307,  6316,  6323, 10272, 10296, 10318, 10350, 10397, 10426, 10454, 10482
*Elset, elset=Set-866
8868890,8868891,8868892,8868893,8868894,8868895
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*Elset, elset=Set-867
8868750,8868751,8868752,8868753,8868754,8868755
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*Elset, elset=Set-868
8868318,8868327,8868328,8868329,8868336,8868337
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*Elset, elset=Set-870, generate
8872790, 8872805,       1
*Elset, elset=__PickedSet867_E3
8828257,8828273,8828289,8828305,8828321,8828337
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*Surface, type=ELEMENT, name=_PickedSet867
__PickedSet867_E3, E3
** Section: ch5_hopperweb_p16
*Shell Section, elset=Set-442, material=Material-13
16, 3
** Section: ch5_btm_p19
*Shell Section, elset=Set-405, material=Material-13
19, 3
** Section: ch5_btm_p195
*Shell Section, elset=Set-406, material=Material-13
19.5, 3
** Section: ch5_btm_p20
*Shell Section, elset=Set-407, material=Material-13
20, 3
** Section: ch5_btm_p22
*Shell Section, elset=Set-408, material=Material-13
22, 3
** Section: ch5_btm_p23
*Shell Section, elset=Set-409, material=Material-13
23, 3
** Section: ch5_btmgrd_p1637
*Shell Section, elset=Set-413, material=Material-13
16.37, 3
** Section: ch5_btmgrd_p1682
*Shell Section, elset=Set-414, material=Material-13
16.82, 3
** Section: ch5_btmgrd_p1985
*Shell Section, elset=Set-415, material=Material-13
19.85, 3
** Section: ch5_floor_p1632
*Shell Section, elset=Set-423, material=Material-13
16.32, 3
** Section: ch5_floor_p1832
*Shell Section, elset=Set-424, material=Material-13
18.32, 3
** Section: ch5_floor_p2132
*Shell Section, elset=Set-425, material=Material-13
21.32, 3
** Section: ch5_hopper_p195
*Shell Section, elset=Set-435, material=Material-13
19.5, 3
** Section: ch5_hopper_p20
*Shell Section, elset=Set-436, material=Material-13
20, 3
** Section: ch5_hopper_p205
*Shell Section, elset=Set-437, material=Material-13
20.5, 3
** Section: ch5_hopper_p235
*Shell Section, elset=Set-438, material=Material-13
23.5, 3
** Section: ch5_hopper_p245
*Shell Section, elset=Set-439, material=Material-13
24.5, 3
** Section: ch5_inbtm_26
*Shell Section, elset=Set-444, material=Material-13
26, 3
** Section: ch5_side_p18
*Shell Section, elset=Set-458, material=Material-13
18, 3
** Section: 5_outshell_S4T300x10x100x  Profile: 5_outshell_S4T300x10x100x
*Beam Section, elset=Set-19, material=Material-13, temperature=GRADIENTS, section=I
274, 300, 0., 100, 0., 52, 40
BeamOrient-19
5, 5
0,273.413,0
** Section: 5_outshell_S4T300x11x115x  Profile: 5_outshell_S4T300x11x115x
*Beam Section, elset=Set-20, material=Material-13, temperature=GRADIENTS, section=I
268, 300, 0., 115, 0., 64, 44
BeamOrient-20
5, 5
0,267.782,0
** Section: Section-250-T-110X300  Profile: Section-250-T-110X300
*Beam Section, elset=Set-45, material=Material-13, temperature=GRADIENTS, section=I
268, 300, 0., 110, 0., 64, 44
BeamOrient-45
5, 5
0,-189.211,-189.211
** Section: Section-257-T-100X300  Profile: Section-257-T-100X300
*Beam Section, elset=Set-52, material=Material-13, temperature=GRADIENTS, section=I
279, 300, 0., 100, 0., 42, 33
BeamOrient-52
5, 5
0,-197.028,-197.028
** Section: ch54_innerbtm_S2HP240x11  Profile: ch54_innerbtm_S2HP240x11
*Beam Section, elset=Set-404, material=Material-13, temperature=GRADIENTS, section=L
44.821, 240, 48.174, 22
0,-1,0
5, 5
0,0,-137
** Section: ch5_btmgrd_S2F300x24  Profile: ch5_btmgrd_S2F300x24
*Beam Section, elset=Set-410, material=Material-13, temperature=GRADIENTS, section=RECT
24, 300
BeamOrient-410
5, 5
0,150,0
** Section: ch5_btmgrd_S2F500x24  Profile: ch5_btmgrd_S2F500x24
*Beam Section, elset=Set-411, material=Material-13, temperature=GRADIENTS, section=RECT
24, 500
BeamOrient-411
5, 5
0,250,0
** Section: ch5_btmgrd_S2F500x24.644  Profile: ch5_btmgrd_S2F500x24.644
*Beam Section, elset=Set-412, material=Material-13, temperature=GRADIENTS, section=RECT
24, 500
BeamOrient-412
5, 5
0,-250,0
** Section: ch5_hopper_S3T300x11x100x  Profile: ch5_hopper_S3T300x11x100x
*Beam Section, elset=Set-433, material=Material-13, temperature=GRADIENTS, section=I
279, 300, 0., 100, 0., 42, 33
BeamOrient-433
5, 5
0,197.028,-197.028
** Section: ch5_hopper_S4T300x11x110x  Profile: ch5_hopper_S4T300x11x110x
*Beam Section, elset=Set-434, material=Material-13, temperature=GRADIENTS, section=I
268, 300, 0., 110, 0., 64, 44
BeamOrient-434
5, 5
0,189.211,-189.211
** Section: ch5_hopperweb_SF400x20  Profile: ch5_hopperweb_SF400x20
*Beam Section, elset=Set-440, material=Material-13, temperature=GRADIENTS, section=RECT
20, 400
BeamOrient-440
5, 5
0,0,0
** Section: ch5_hopperweb_ST500x20x20  Profile: ch5_hopperweb_ST500x20x20
*Beam Section, elset=Set-441, material=Material-13, temperature=GRADIENTS, section=I
485, 500, 0., 200, 0., 30, 20
BeamOrient-441
5, 5
484.597,0,0
** Section: ch5_innerbtm_S2F500x12  Profile: ch5_innerbtm_S2F500x12
*Beam Section, elset=Set-445, material=Material-13, temperature=GRADIENTS, section=RECT
24, 500
1,0,0
5, 5
0,0,-250
** Section: ch5_innerbtm_S2T350x12x12  Profile: ch5_innerbtm_S2T350x12x12
*Beam Section, elset=Set-446, material=Material-13, temperature=GRADIENTS, section=I
328, 350, 0., 120, 0., 44, 24
BeamOrient-446
5, 5
0,0,-327.806
** Section: ch5_innerbtm_S3T350x12x12  Profile: ch5_innerbtm_S3T350x12x12
*Beam Section, elset=Set-447, material=Material-13, temperature=GRADIENTS, section=I
317, 350, 0., 120, 0., 66, 33
BeamOrient-447
5, 5
0,0,-316.847
** Section: ch5_outshell_S2F500x12  Profile: ch5_outshell_S2F500x12
*Beam Section, elset=Set-448, material=Material-13, temperature=GRADIENTS, section=RECT
24, 500
BeamOrient-448
5, 5
0,0,250
** Section: ch5_outshell_S2HP200x10  Profile: ch5_outshell_S2HP200x10
*Beam Section, elset=Set-449, material=Material-13, temperature=GRADIENTS, section=L
37.851, 200, 39.478, 20
0,-1,0
5, 5
0,0,120
** Section: ch5_outshell_S2T320x11x12  Profile: ch5_outshell_S2T320x11x12
*Beam Section, elset=Set-450, material=Material-13, temperature=GRADIENTS, section=I
302, 320, 0., 125, 0., 36, 22
BeamOrient-450
5, 5
0,0,302.011
** Section: ch5_outshell_S3T320x11x12  Profile: ch5_outshell_S3T320x11x12
*Beam Section, elset=Set-451, material=Material-13, temperature=GRADIENTS, section=I
293, 320, 0., 125, 0., 54, 33
BeamOrient-451
5, 5
0,0,292.448
** Section: ch5_outshell_S4T300x10x10  Profile: ch5_outshell_S4T300x10x10
*Beam Section, elset=Set-455, material=Material-13, temperature=GRADIENTS, section=I
274, 300, 0., 100, 0., 52, 40
BeamOrient-455
5, 5
0,-273.413,0
** Section: ch5_outshell_S4T300x11x11  Profile: ch5_outshell_S4T300x11x11
*Beam Section, elset=Set-456, material=Material-13, temperature=GRADIENTS, section=I
268, 300, 0., 115, 0., 64, 44
BeamOrient-456
5, 5
0,-267.782,0
** Section: ch5_outshell_S5T350x11x12  Profile: ch5_outshell_S5T350x11x12
*Beam Section, elset=Set-457, material=Material-13, temperature=GRADIENTS, section=I
300, 350, 0., 120, 0., 100, 55
BeamOrient-457
5, 5
0.0001423,1.3546e-07,299.447
** Section: T12
*Shell Section, elset=Set-868, material=Material-1
12, 5
** Section: T14
*Shell Section, elset=Set-867, material=Material-1
14, 5
** Section: T10
*Shell Section, elset=Set-866, material=Material-1
10, 5
** Section: truss
*Solid Section, elset=Set-870, material=Material-1
3000,
*Distribution, name=BeamOrient-19, location=ELEMENT, Table=BeamOrient-19_Table
, 0.,0.,-1.
8751142, 0.000644782,0,1
8751144, 0.000644603,0,1
8751137, -0.00557491,0,0.999985
8751138, 0.000428543,0,1
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8826477, 0.000641026,0,1
*Distribution, name=BeamOrient-20, location=ELEMENT, Table=BeamOrient-20_Table
, 0.,0.,-1.
8751167, -0.00192857,0,-0.999998
8751130, 0.00128572,0,0.999999
8751131, 0.00128572,0,0.999999
8751132, 0.00128572,0,0.999999
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8826522, -0.0111568,-2.27374e-12,0.999938
*Distribution, name=BeamOrient-45, location=ELEMENT, Table=BeamOrient-45_Table
, 0.,0.,-1.
8750730, 0,0.707107,-0.707107
8750731, 0,-0.707107,0.707107
8750732, 0,-0.707107,0.707107
8750733, 0,-0.707107,0.707107
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8826545, 0,-0.707107,0.707107
*Distribution, name=BeamOrient-52, location=ELEMENT, Table=BeamOrient-52_Table
, 0.,0.,-1.
8750726, 0,-0.707107,0.707107
8750727, 0,-0.707107,0.707107
8750725, 0,-0.707107,0.707107
8750728, 0,-0.707107,0.707107
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8826586, 0,-0.707107,0.707107
*Distribution, name=BeamOrient-410, location=ELEMENT, Table=BeamOrient-410_Table
, 0.,0.,-1.
8747808, -1,0,0
8747807, -1,0,0
8747806, -1,0,0
8747805, -1,0,0
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8826665, -1,0,0
*Distribution, name=BeamOrient-411, location=ELEMENT, Table=BeamOrient-411_Table
, 0.,0.,-1.
8747962, -1,0,0
8747961, -1,0,0
8747960, -1,0,0
8747959, -1,0,0
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8826692, -1,0,0
*Distribution, name=BeamOrient-412, location=ELEMENT, Table=BeamOrient-412_Table
, 0.,0.,-1.
8761397, -1,0,0
8761395, -1,0,0
8761394, -1,0,0
8761393, -1,0,0
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8826719, -1,0,0
*Distribution, name=BeamOrient-433, location=ELEMENT, Table=BeamOrient-433_Table
, 0.,0.,-1.
2185796, 0,0.707107,0.707107
2185797, 0,0.707107,0.707107
2185798, 0,0.707107,0.707107
2185799, 0,0.707107,0.707107
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8826777, 0,-0.707107,-0.707107
*Distribution, name=BeamOrient-434, location=ELEMENT, Table=BeamOrient-434_Table
, 0.,0.,-1.
2185813, 0,0.707107,0.707107
2185812, 0,-0.707107,-0.707107
2185814, 0,0.707107,0.707107
2185815, 0,0.707107,0.707107
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8826800, 0,0.707107,0.707107
*Distribution, name=BeamOrient-440, location=ELEMENT, Table=BeamOrient-440_Table
, 0.,0.,-1.
5797992, 0,-0.499016,-0.866593
5797991, 0,-0.989157,-0.146864
5797993, 0,0.355113,-0.934823
5797994, 0,0.711452,-0.702734
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8826993, 0,0.248458,0.968643
*Distribution, name=BeamOrient-441, location=ELEMENT, Table=BeamOrient-441_Table
, 0.,0.,-1.
5798210, 0,-0.927244,-0.374458
5798209, 0,-0.999269,0.0382302
5798208, 0,-0.927244,-0.374458
5798207, 0,-0.99918,0.0404852
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8827418, 0,-0.999353,0.0359746
*Distribution, name=BeamOrient-446, location=ELEMENT, Table=BeamOrient-446_Table
, 0.,0.,-1.
2186133, 0,1,0
2186134, 0,1,0
2186135, 0,1,0
2186136, 0,1,0
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8827501, 0,1,0
*Distribution, name=BeamOrient-447, location=ELEMENT, Table=BeamOrient-447_Table
, 0.,0.,-1.
2186157, 0,1,0
8750844, 0,-1,0
8750843, 0,-1,0
8750842, 0,-1,0
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8868309, 0,1,0
*Distribution, name=BeamOrient-448, location=ELEMENT, Table=BeamOrient-448_Table
, 0.,0.,-1.
8761497, 1,0,0
8747817, -1,0,0
8761252, -1,0,0
8761251, -1,0,0
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8827813, -1,0,0
*Distribution, name=BeamOrient-450, location=ELEMENT, Table=BeamOrient-450_Table
, 0.,0.,-1.
2186473, 0,-1,0
2186381, 0,-1,0
2186380, 0,-1,0
2186379, 0,-1,0
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8827851, 0,-1,0
*Distribution, name=BeamOrient-451, location=ELEMENT, Table=BeamOrient-451_Table
, 0.,0.,-1.
8751103, 0,1,0
8751102, 0,1,0
8751101, 0,1,0
8751100, 0,1,0
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8828109, 0,-1,0
*Distribution, name=BeamOrient-455, location=ELEMENT, Table=BeamOrient-455_Table
, 0.,0.,-1.
2186441, 0.000644603,0,1
2186439, 0.000644782,0,1
2186438, 0.000428543,0,1
2186437, -0.00557491,0,0.999985
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8828139, 0.000641026,0,1
*Distribution, name=BeamOrient-456, location=ELEMENT, Table=BeamOrient-456_Table
, 0.,0.,-1.
2186432, 0.00128572,0,0.999999
2186433, 0.00128938,0,0.999999
2186434, 0.00128572,0,0.999999
2186436, 0.00129672,0,0.999999
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8828165, 0.00128572,0,0.999999
*Distribution, name=BeamOrient-457, location=ELEMENT, Table=BeamOrient-457_Table
, 0.,0.,-1.
8751127, -0.000952238,1,-8.32667e-15
2186420, -0.000622424,-1,2.85161e-13
2186419, 0.00835093,-0.999965,-5.21041e-11
2186422, -0.000952238,-1,5.19584e-14
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8828230, -0.00098944,-1,-8.18234e-14
*End Part
**
**
** ASSEMBLY
**
*Assembly, name=Assembly
**
*Instance, name=NAS-180k-dry-1, part=NAS-180k-dry
*End Instance
**
*Nset, nset=m_Set-1, instance=NAS-180k-dry-1
 57672
*Nset, nset=s_Set-1, instance=NAS-180k-dry-1, generate
 53328,  53331,      1
*Nset, nset=m_Set-3, instance=NAS-180k-dry-1
 57673
*Nset, nset=s_Set-3, instance=NAS-180k-dry-1, generate
 53454,  53457,      1
*Nset, nset=m_Set-5, instance=NAS-180k-dry-1
 57676
*Nset, nset=s_Set-5, instance=NAS-180k-dry-1, generate
 53937,  53940,      1
*Nset, nset=m_Set-7, instance=NAS-180k-dry-1
 57677
*Nset, nset=s_Set-7, instance=NAS-180k-dry-1, generate
 54031,  54034,      1
*Nset, nset=m_Set-9, instance=NAS-180k-dry-1
 57674
*Nset, nset=s_Set-9, instance=NAS-180k-dry-1, generate
 54494,  54497,      1
*Nset, nset=m_Set-11, instance=NAS-180k-dry-1
 57675
*Nset, nset=s_Set-11, instance=NAS-180k-dry-1, generate
 54588,  54591,      1
*Nset, nset=m_Set-13, instance=NAS-180k-dry-1
 57678
*Nset, nset=s_Set-13, instance=NAS-180k-dry-1, generate
 55049,  55052,      1
*Nset, nset=m_Set-15, instance=NAS-180k-dry-1
 57679
*Nset, nset=s_Set-15, instance=NAS-180k-dry-1, generate
 55143,  55146,      1
*Nset, nset=m_Set-17, instance=NAS-180k-dry-1
 57680
*Nset, nset=s_Set-17, instance=NAS-180k-dry-1
 57475, 57476, 57477, 57482
*Nset, nset=m_Set-19, instance=NAS-180k-dry-1
 57681
*Nset, nset=s_Set-19, instance=NAS-180k-dry-1
 57569, 57570, 57571, 57576
*Nset, nset=m_Set-21, instance=NAS-180k-dry-1
 57683
*Nset, nset=s_Set-21, instance=NAS-180k-dry-1
 56343, 56344, 56345, 56350
*Nset, nset=m_Set-23, instance=NAS-180k-dry-1
 57682
*Nset, nset=s_Set-23, instance=NAS-180k-dry-1
 56249, 56250, 56251, 56256
*Nset, nset=m_Set-25, instance=NAS-180k-dry-1
 57685
*Nset, nset=s_Set-25, instance=NAS-180k-dry-1
 56956, 56957, 56958, 56963
*Nset, nset=m_Set-27, instance=NAS-180k-dry-1
 57684
*Nset, nset=s_Set-27, instance=NAS-180k-dry-1
 56862, 56863, 56864, 56869
*Nset, nset=m_Set-29, instance=NAS-180k-dry-1
 57686
*Nset, nset=s_Set-29, instance=NAS-180k-dry-1
 55636, 55637, 55638, 55643
*Nset, nset=m_Set-31, instance=NAS-180k-dry-1
 57687
*Nset, nset=s_Set-31, instance=NAS-180k-dry-1
 55730, 55731, 55732, 55737
*Nset, nset=Set-33, instance=NAS-180k-dry-1
 57691, 57692, 57693, 57695
*Surface, type=NODE, name=s_Set-1_CNS_
s_Set-1, 1
*Surface, type=NODE, name=s_Set-19_CNS_
s_Set-19, 1
*Surface, type=NODE, name=s_Set-21_CNS_
s_Set-21, 1
*Surface, type=NODE, name=s_Set-23_CNS_
s_Set-23, 1
*Surface, type=NODE, name=s_Set-25_CNS_
s_Set-25, 1
*Surface, type=NODE, name=s_Set-27_CNS_
s_Set-27, 1
*Surface, type=NODE, name=s_Set-29_CNS_
s_Set-29, 1
*Surface, type=NODE, name=s_Set-31_CNS_
s_Set-31, 1
*Surface, type=NODE, name=s_Set-3_CNS_
s_Set-3, 1
*Surface, type=NODE, name=s_Set-5_CNS_
s_Set-5, 1
*Surface, type=NODE, name=s_Set-7_CNS_
s_Set-7, 1
*Surface, type=NODE, name=s_Set-9_CNS_
s_Set-9, 1
*Surface, type=NODE, name=s_Set-11_CNS_
s_Set-11, 1
*Surface, type=NODE, name=s_Set-13_CNS_
s_Set-13, 1
*Surface, type=NODE, name=s_Set-15_CNS_
s_Set-15, 1
*Surface, type=NODE, name=s_Set-17_CNS_
s_Set-17, 1
** Constraint: Constraint-1
*Coupling, constraint name=Constraint-1, ref node=m_Set-1, surface=s_Set-1_CNS_
*Kinematic
** Constraint: Constraint-10
*Coupling, constraint name=Constraint-10, ref node=m_Set-19, surface=s_Set-19_CNS_
*Kinematic
** Constraint: Constraint-11
*Coupling, constraint name=Constraint-11, ref node=m_Set-21, surface=s_Set-21_CNS_
*Kinematic
** Constraint: Constraint-12
*Coupling, constraint name=Constraint-12, ref node=m_Set-23, surface=s_Set-23_CNS_
*Kinematic
** Constraint: Constraint-13
*Coupling, constraint name=Constraint-13, ref node=m_Set-25, surface=s_Set-25_CNS_
*Kinematic
** Constraint: Constraint-14
*Coupling, constraint name=Constraint-14, ref node=m_Set-27, surface=s_Set-27_CNS_
*Kinematic
** Constraint: Constraint-15
*Coupling, constraint name=Constraint-15, ref node=m_Set-29, surface=s_Set-29_CNS_
*Kinematic
** Constraint: Constraint-16
*Coupling, constraint name=Constraint-16, ref node=m_Set-31, surface=s_Set-31_CNS_
*Kinematic
** Constraint: Constraint-2
*Coupling, constraint name=Constraint-2, ref node=m_Set-3, surface=s_Set-3_CNS_
*Kinematic
** Constraint: Constraint-3
*Coupling, constraint name=Constraint-3, ref node=m_Set-5, surface=s_Set-5_CNS_
*Kinematic
** Constraint: Constraint-4
*Coupling, constraint name=Constraint-4, ref node=m_Set-7, surface=s_Set-7_CNS_
*Kinematic
** Constraint: Constraint-5
*Coupling, constraint name=Constraint-5, ref node=m_Set-9, surface=s_Set-9_CNS_
*Kinematic
** Constraint: Constraint-6
*Coupling, constraint name=Constraint-6, ref node=m_Set-11, surface=s_Set-11_CNS_
*Kinematic
** Constraint: Constraint-7
*Coupling, constraint name=Constraint-7, ref node=m_Set-13, surface=s_Set-13_CNS_
*Kinematic
** Constraint: Constraint-8
*Coupling, constraint name=Constraint-8, ref node=m_Set-15, surface=s_Set-15_CNS_
*Kinematic
** Constraint: Constraint-9
*Coupling, constraint name=Constraint-9, ref node=m_Set-17, surface=s_Set-17_CNS_
*Kinematic
*End Assembly
**
** MATERIALS
**
*Material, name=Material-1
*Density
1.7724e-08,
*Elastic
206000, 0.3
*Material, name=Material-10
*Density
8.4078e-08,
*Elastic
206000, 0.3
*Material, name=Material-11
*Density
8.7377e-08,
*Elastic
206000, 0.3
*Material, name=Material-12
*Density
9.1153e-08,
*Elastic
206000, 0.3
*Material, name=Material-13
*Density
8.2374e-08,
*Elastic
206000, 0.3
*Material, name=Material-2
*Density
8.3713e-08,
*Elastic
206000, 0.3
*Material, name=Material-3
*Density
7.9589e-08,
*Elastic
206000, 0.3
*Material, name=Material-4
*Density
8.2596e-08,
*Elastic
206000, 0.3
*Material, name=Material-5
*Density
1.3314e-08,
*Elastic
206000, 0.3
*Material, name=Material-6
*Density
1.7724e-08,
*Elastic
206000, 0.3
*Material, name=Material-7
*Density
9.0913e-09,
*Elastic
206000, 0.3
*Material, name=Material-8
*Density
1.0001e-07,
*Elastic
206000, 0.3
*Material, name=Material-9
*Density
8.3537e-08,
*Elastic
206000, 0.3
*Distribution Table, name=BeamOrient-19_Table
ORIENTATION
*Distribution Table, name=BeamOrient-20_Table
ORIENTATION
*Distribution Table, name=BeamOrient-45_Table
ORIENTATION
*Distribution Table, name=BeamOrient-52_Table
ORIENTATION
*Distribution Table, name=BeamOrient-410_Table
ORIENTATION
*Distribution Table, name=BeamOrient-411_Table
ORIENTATION
*Distribution Table, name=BeamOrient-412_Table
ORIENTATION
*Distribution Table, name=BeamOrient-433_Table
ORIENTATION
*Distribution Table, name=BeamOrient-434_Table
ORIENTATION
*Distribution Table, name=BeamOrient-440_Table
ORIENTATION
*Distribution Table, name=BeamOrient-441_Table
ORIENTATION
*Distribution Table, name=BeamOrient-446_Table
ORIENTATION
*Distribution Table, name=BeamOrient-447_Table
ORIENTATION
*Distribution Table, name=BeamOrient-448_Table
ORIENTATION
*Distribution Table, name=BeamOrient-450_Table
ORIENTATION
*Distribution Table, name=BeamOrient-451_Table
ORIENTATION
*Distribution Table, name=BeamOrient-455_Table
ORIENTATION
*Distribution Table, name=BeamOrient-456_Table
ORIENTATION
*Distribution Table, name=BeamOrient-457_Table
ORIENTATION
**
** BOUNDARY CONDITIONS
**
** ----------------------------------------------------------------
**
** STEP:Step-1
**
*Step, name=Step-1
*Static
1, 1, 1e-05, 1
**
** BOUNDARY CONDITIONS
**
** Name: BC-1 Type: Symmetry/Antisymmetry/Encastre
*Boundary
Set-33, ENCASTRE
**
** LOADS
**
** Name: Load-1   Type: Gravity
*Dload
, GRAV, 10791, 0, 0, -1
**
** OUTPUT REQUESTS
**
*Restart, write, frequency=0
**
**  FIELD  OUTPUT:F-Output-1
**
*Output, field, variable=PRESELECT
*Output, history, variable=PRESELECT
*End Step
